// SBML level 2 version 4
// dcterms:bibliographicCitation: urn:miriam:pubmed:10500180

function Constant_flux__irreversible(v)
  v;
end
Constant_flux__irreversible is "Constant flux (irreversible)";

function Function_for_1_modifier_1_substrate(k, substrate, modifier)
  k*substrate*modifier;
end

function function_for_reaction_14(k14, k14_, p53)
  k14/(1 + k14_*p53);
end

function function_for_R15_MPF_degradation(k15, MPF)
  k15*MPF*MPF;
end

function function_for_R18(k18, MPF, iCdc25Ps216, k_Plk1_)
  k18*MPF*iCdc25Ps216 + k_Plk1_*iCdc25Ps216;
end

function function_for_R20(modifier, k)
  k*modifier;
end

function function_for_R9(k9, aCdc25, aCdc25Ps216, preMPF, k9_)
  k9*(aCdc25 + aCdc25Ps216)*preMPF + k9_*preMPF;
end

function function_for_R8(k8, MPF, Wee1, k8_)
  k8*MPF*Wee1 + k8_*Wee1;
end

model Aguda1999___G2_DNA_damage_checkpoint()
  // Aguda1999 - G2 DNA damage checkpoint
  // biomodels.db:MODEL6960055446
  // biomodels.db:BIOMD0000000704
  // isDescribedBy pubmed:10500180
  // hasPart GO:0031572
  // hasProperty mamo:MAMO_0000046
  // hasTaxon taxonomy:7742

  // Compartments:
  compartment nucleus = 1;  // isVersionOf ncit:C13197

  // Species:
  species Cdc25_active in nucleus = 1e-6;  // isHomologTo uniprot:P30304; hasProperty ncit:C45329
  species Cdc25Ps216_active in nucleus = 0;  // isHomologTo uniprot:P30304; hasProperty PATO:0002220; hasProperty ncit:C45329
  species Cdc25_inactive in nucleus = 1e-6;  // isHomologTo uniprot:P30304; hasProperty ncit:C118254
  species Cdc25Ps216_inactive in nucleus = 2e-5;  // isHomologTo uniprot:P30304; hasProperty ncit:C118254; hasProperty PATO:0002220
  species Chk1P in nucleus = 1e-6;  // isHomologTo uniprot:O14757; hasProperty PATO:0002220
  species protein_14_3_3 in nucleus = 2; protein_14_3_3 is "protein 14-3-3";  // isHomologTo uniprot:P31947
  species Cdc25Ps216_14_3_3_inactive in nucleus = 0.03; Cdc25Ps216_14_3_3_inactive is "Cdc25Ps216_14-3-3_inactive";  // hasPart uniprot:P30304; hasProperty GO:0032991; hasPart uniprot:P31947; hasProperty ncit:C118254
  species p53 in nucleus = 0;  // isHomologTo uniprot:P04637
  species p21 in nucleus = 0;  // isHomologTo uniprot:P38936
  species MPF in nucleus = 1e-8;  // hasPart uniprot:P06493; hasProperty ncit:C45329; hasPart uniprot:P14635; hasProperty GO:0032991
  species p21_MPF in nucleus = 0; p21_MPF is "p21/MPF";  // hasPart uniprot:P38936; hasProperty GO:0032991; hasPart uniprot:P06493; hasPart uniprot:P14635
  species preMPF in nucleus = 1e-6;  // hasPart uniprot:P14635; hasProperty ncit:C118254; hasPart uniprot:P06493; hasProperty GO:0032991
  species Wee1 in nucleus = 0.001;  // isHomologTo uniprot:P30291
  species Chk1 in nucleus = 0.999999;  // isHomologTo uniprot:O14757
  species Rad3_ATM in nucleus = 0; Rad3_ATM is "Rad3/ATM";  // isHomologTo uniprot:Q13535
  species Wee1_phosphorylated in nucleus = 0;  // isHomologTo uniprot:P30291; hasProperty PATO:0002220
  species $Cdc25_active_total in nucleus;  // isHomologTo uniprot:P30304; hasProperty ncit:C45329

  // Parameters:
  k1 = 1;
  k1_0 = 10; k1_0 is "k1-";
  k2 = 0.1;
  k2_0 = 0.01; k2_0 is "k2-";
  k2_1 = 0.1;
  k_ctak1 = 0;
  k_ctak1_0 = 0;
  k3 = 100; k3 is "k3_";
  k_3 = 0; k_3 is "k-3_";
  k4 = 0.2;
  k5 = 1;
  k6 = 0.01;
  k7 = 1;
  k_Plk1 = 0;
  k7_0 = 0.01; k7_0 is "k7-";
  k8 = 0.1;
  k8_0 = 0;
  k8_1 = 0.01; k8_1 is "k8-";
  k9 = 1;
  k9_0 = 0;
  k9_1 = 1; k9_1 is "k9-";
  k10 = 0.2;
  k11 = 1;
  k12 = 0.1;
  k13 = 1;
  k14 = 0.0005;
  k14_0 = 1;
  k15 = 0.01;
  k16 = 0.0002;
  k17 = 0.1;
  k18 = 1;
  k_Plk1_0 = 0;
  k18_0 = 0.01; k18_0 is "k18-";
  k20 = 0.1;
  k21 = 0.01;
  k22 = 0.1;
  k23 = 0.1;
  k_23 = 1; k_23 is "k-23";
  kex = 1;
  kin = 1e-5;

  // Assignment rules:
  Cdc25_active_total := Cdc25_active + Cdc25Ps216_active;

  // Reactions:
  R2_Cdc25_Phosphorylation: Cdc25_active => Cdc25Ps216_active; nucleus*function_for_R18(k2, Chk1P, Cdc25_active, k_ctak1);  // modifiers: Chk1P; isVersionOf GO:0016310
  R2__Cdc25_Dephosphorylation: Cdc25Ps216_active => Cdc25_active; nucleus*k2_0*Cdc25Ps216_active; R2__Cdc25_Dephosphorylation is "R2- Cdc25 Dephosphorylation";  // isVersionOf GO:0016311
  R7__Cdc25_inactivation: Cdc25_active => Cdc25_inactive; nucleus*k7_0*Cdc25_active; R7__Cdc25_inactivation is "R7- Cdc25 inactivation";  // isVersionOf GO:0016311
  R7_Cdc25_Activation: Cdc25_inactive => Cdc25_active; nucleus*function_for_R18(k7, MPF, Cdc25_inactive, k_Plk1);  // modifiers: MPF; isVersionOf GO:0016310
  R18_Cdc25Ps216_activation: Cdc25Ps216_inactive => Cdc25Ps216_active; nucleus*function_for_R18(k18, MPF, Cdc25Ps216_inactive, k_Plk1_0);  // modifiers: MPF; isVersionOf GO:0016310
  R18__Cdc25Ps216_inactivation: Cdc25Ps216_active => Cdc25Ps216_inactive; nucleus*k18_0*Cdc25Ps216_active; R18__Cdc25Ps216_inactivation is "R18- Cdc25Ps216 inactivation";  // isVersionOf GO:0016311
  R2__Cdc25_Phosphorylation: Cdc25_inactive => Cdc25Ps216_inactive; nucleus*function_for_R18(k2_1, Chk1P, Cdc25_inactive, k_ctak1_0);  // modifiers: Chk1P; isVersionOf GO:0016310
  R3___Cdc25_protein_14_3_3_unbinding: Cdc25Ps216_14_3_3_inactive => protein_14_3_3 + Cdc25_inactive; nucleus*k_3*Cdc25Ps216_14_3_3_inactive; R3___Cdc25_protein_14_3_3_unbinding is "R3-_ Cdc25 protein 14-3-3 unbinding";
  R12_14_3_3_degradation: protein_14_3_3 => ; nucleus*k12*protein_14_3_3; R12_14_3_3_degradation is "R12 14-3-3 degradation";
  R13_14_3_3_synthesis: => protein_14_3_3; nucleus*Constant_flux__irreversible(k13); R13_14_3_3_synthesis is "R13 14-3-3 synthesis";  // isVersionOf ncit:C61408
  R6_14_3_3_synthesis_mediated_by_p53: => protein_14_3_3; nucleus*function_for_R20(p53, k6); R6_14_3_3_synthesis_mediated_by_p53 is "R6 14-3-3 synthesis mediated by p53";  // modifiers: p53; isVersionOf ncit:C61408
  R3___protein_14_3_3_Cdc25_binding: protein_14_3_3 + Cdc25Ps216_inactive => Cdc25Ps216_14_3_3_inactive; nucleus*k3*protein_14_3_3*Cdc25Ps216_inactive; R3___protein_14_3_3_Cdc25_binding is "R3_ protein 14-3-3 Cdc25 binding";  // isVersionOf GO:0005515
  R20_p21_synthesis_mediated_by_p53: => p21; nucleus*function_for_R20(p53, k20);  // modifiers: p53; isVersionOf ncit:C61408
  R21_p21_natural_synthesis: => p21; nucleus*Constant_flux__irreversible(k21);  // isVersionOf ncit:C61408
  R22_p21_degradation: p21 => ; nucleus*k22*p21;
  R23_p21_MPF_complex_formation: p21 + MPF => p21_MPF; nucleus*k23*p21*MPF; R23_p21_MPF_complex_formation is "R23 p21/MPF complex formation";  // isVersionOf GO:0005515
  R23__p21_MPF_unbinding: p21_MPF => p21 + MPF; nucleus*k_23*p21_MPF; R23__p21_MPF_unbinding is "R23- p21 MPF unbinding";
  R9_MPF_activation: preMPF => MPF; nucleus*function_for_R9(k9, Cdc25_active, Cdc25Ps216_active, preMPF, k9_0);  // modifiers: Cdc25_active, Cdc25Ps216_active
  R9__MPF_inactivation: MPF => preMPF; nucleus*Function_for_1_modifier_1_substrate(k9_1, MPF, Wee1); R9__MPF_inactivation is "R9- MPF inactivation";  // modifiers: Wee1
  R15_MPF_degradation: MPF => ; nucleus*function_for_R15_MPF_degradation(k15, MPF);
  R14_preMPF_synthesis: => preMPF; nucleus*function_for_reaction_14(k14, k14_0, p53);  // modifiers: p53; isVersionOf ncit:C61408
  R1_Chk1_Phosphorylation: Chk1 => Chk1P; nucleus*Function_for_1_modifier_1_substrate(k1, Chk1, Rad3_ATM);  // modifiers: Rad3_ATM; isVersionOf GO:0016310
  R1__Chk1_Dephosphorylation: Chk1P => Chk1; nucleus*k1_0*Chk1P; R1__Chk1_Dephosphorylation is "R1- Chk1 Dephosphorylation";  // isVersionOf GO:0016311
  R4_Rad3_ATM_natural_synthesis: => Rad3_ATM; nucleus*Constant_flux__irreversible(k4); R4_Rad3_ATM_natural_synthesis is "R4 Rad3/ATM natural synthesis";  // isVersionOf ncit:C61408
  R5_Rad3_ATM_degradation: Rad3_ATM => ; nucleus*k5*Rad3_ATM; R5_Rad3_ATM_degradation is "R5 Rad3/ATM degradation";
  R10_p53_synthesis: => p53; nucleus*Constant_flux__irreversible(k10);  // isVersionOf ncit:C61408
  R11_p53_degradation: p53 => ; nucleus*k11*p53;
  R16_Wee1_synthesis: => Wee1; nucleus*Constant_flux__irreversible(k16);  // isVersionOf ncit:C61408
  R8_Wee1_Phosphorylation: Wee1 => Wee1_phosphorylated; nucleus*function_for_R8(k8, MPF, Wee1, k8_0);  // modifiers: MPF; isVersionOf GO:0016310
  R8__Wee1_Dephosphorylation: Wee1_phosphorylated => Wee1; nucleus*k8_1*Wee1_phosphorylated; R8__Wee1_Dephosphorylation is "R8- Wee1 Dephosphorylation";  // isVersionOf GO:0016311
  R17_Wee1P_degradation: Wee1_phosphorylated => ; nucleus*k17*Wee1_phosphorylated;
  Rex_Nuclear_export_of_iCdc25Ps216_14_3_3: Cdc25Ps216_14_3_3_inactive => ; nucleus*kex*Cdc25Ps216_14_3_3_inactive; Rex_Nuclear_export_of_iCdc25Ps216_14_3_3 is "Rex Nuclear export of iCdc25Ps216_14–3–3";  // isVersionOf GO:0051168
  Rin_nuclear_import_of_iCdc25: => Cdc25_inactive; nucleus*Constant_flux__irreversible(kin);  // isVersionOf GO:0051170

  // Unit definitions:
  unit volume = 1e-3 litre;
  unit time = 60 second;
  unit substance = 1e-3 mole;
end
