// SBML level 3 version 1
// dcterms:bibliographicCitation: urn:miriam:pubmed:21967667

function hg(b, pro, const, mod)
  b*pro*(1 - pro - (1 - const)*mod);
end
hg is "growth";

function ti(b, sub, mod, con)
  b*sub*mod*con;
end
ti is "inhibition";

model Chen2011_2___bone_marrow_invasion_relative_model()
  // Chen2011/2 - bone marrow invasion relative model
  // The paper describes a model of tumor invasion to bone marrow. Created by COPASI 4.26 (Build 213) This model is described in the article: Modeling invasion of metastasizing cancer cells to bone marrow utilizing ecological principles Kun-Wan Chen, Kenneth J Pienta Theoretical Biology and Medical Modelling 2011, 8:36 Abstract: Background: The invasion of a new species into an established ecosystem can be directly compared to the steps involved in cancer metastasis. Cancer must grow in a primary site, extravasate and survive in the circulation to then intravasate into target organ (invasive species survival in transport). Cancer cells often lay dormant at their metastatic site for a long period of time (lag period for invasive species) before proliferating (invasive spread). Proliferation in the new site has an impact on the target organ microenvironment (ecological impact) and eventually the human host (biosphere impact). Results: Tilman has described mathematical equations for the competition between invasive species in a structured habitat. These equations were adapted to study the invasion of cancer cells into the bone marrow microenvironment as a structured habitat. A large proportion of solid tumor metastases are bone metastases, known to usurp hematopoietic stem cells (HSC) homing pathways to establish footholds in the bone marrow. This required accounting for the fact that this is the natural home of hematopoietic stem cells and that they already occupy this structured space. The adapted Tilman model of invasion dynamics is especially valuable for modeling the lag period or dormancy of cancer cells. Conclusions: The Tilman equations for modeling the invasion of two species into a defined space have been modified to study the invasion of cancer cells into the bone marrow microenvironment. These modified equations allow a more flexible way to model the space competition between the two cell species. The ability to model initial density, metastatic seeding into the bone marrow and growth once the cells are present, and movement of cells out of the bone marrow niche and apoptosis of cells are all aspects of the adapted equations. These equations are currently being applied to clinical data sets for verification and further refinement of the models. To cite BioModels Database, please use: BioModels Database: An enhanced, curated and annotated resource for published quantitative kinetic models . To the extent possible under law, all copyright and related or neighbouring rights to this encoded model have been dedicated to the public domain worldwide. Please refer to CC0 Public Domain Dedication for more information.
  // isDescribedBy pubmed:21967667
  // occursIn BTO:0000141
  // hasProperty ncit:C20625
  // hasProperty mamo:MAMO_0000046
  // hasTaxon taxonomy:9606
  // biomodels.db:MODEL1908130004 biomodels.db:BIOMD0000000795
  // model units - substance: substance, time: time, volume: volume, area: area, length: length, extent: substance

  // Compartments:
  compartment bone_marrow = 1 volume;  // BTO:0000141; isVersionOf ncit:C94498

  // Species:
  // HSC density
  // init=0.5/0.85/0.84
  species H in bone_marrow = 0.84;  // isVersionOf CL:0000037
  // cancer cell density
  // int=0.0001/0.01/0.0001
  species T in bone_marrow = 0.0001;  // isVersionOf CL:0001064

  // Parameters:
  // tumor growth rate
  b1 = 0.2 unit_0;
  // tumor death rate
  u1 = 0.1 unit_0;  // isVersionOf ncit:C25636
  // HSC growth rate
  // =0.8/0.8/0.61
  b2 = 0.61 unit_0;
  // HSC death rate
  u2 = 0.1 unit_0;  // isVersionOf ncit:C25636
  // competition coefficient
  v = 0.1 unit_0;  // isVersionOf ncit:C48922
  // competition coefficient
  k = 0.9 unit_0;  // isVersionOf ncit:C48922

  // Reactions:
  HSC_growth: => H; bone_marrow*hg(b2, H, v, T);  // modifiers: T; isVersionOf GO:0008283
  HSC_death: H => ; bone_marrow*u2*H;  // isVersionOf GO:0008219
  Tumor_growth: => T; bone_marrow*hg(b1, T, k, H);  // modifiers: H; isVersionOf GO:0008283
  Tumor_death: T => ; bone_marrow*u1*T;  // isVersionOf GO:0008219
  Tumor_inhibition: T => ; bone_marrow*ti(b2, T, H, v);  // modifiers: H; isVersionOf GO:0008219
  HSC_inhibition: H => ; bone_marrow*ti(b1, H, T, k);  // modifiers: T; isVersionOf GO:0008219

  // Unit definitions:
  unit length = metre;
  unit area = metre^2;
  unit volume = 1e-3 litre;
  unit time = second;
  unit substance = 1e-3 mole;
  unit unit_0 = dimensionless^0; unit_0 is "1";
end
